Notional Conventional AVL Validation Aircraft
#Mach
0        ! AeroSandbox note: This is overwritten later to match the current OperatingPoint Mach during the AVL run.
#IYsym   IZsym   Zsym
0       0   0
#Sref    Cref    Bref
11.151325522115505 1.166903837207412 10.025780270667946
#Xref    Yref    Zref
0.4907421358174329 0.0 0.1401316016656464
# CDp
0
#===============================================================================
SURFACE
Main Wing
#Nchordwise  Cspace  [Nspanwise   Sspace]
10   1   12   1

YDUPLICATE
0

CDCL
#CL1  CD1  CL2  CD2  CL3  CD3
0 0 0 0 0 0

#--------------------------------------------------
SECTION
#Xle    Yle    Zle     Chord   Ainc  [Nspanwise   Sspace]
0 0 0 1.5 1

AFIL
C:\Users\tsher\OneDrive\Documents\Aircraft_Design\Github\AeroSandbox\studies\TSher_Improvements\vlm_avl_liftingline_validation_outputs\avl_work\airplane.avl.af0

CLAF
1.0

CDCL
#CL1  CD1  CL2  CD2  CL3  CD3
0 0 0 0 0 0

#--------------------------------------------------
SECTION
#Xle    Yle    Zle     Chord   Ainc  [Nspanwise   Sspace]
0.15 2.5 0.15 1.15 0

AFIL
C:\Users\tsher\OneDrive\Documents\Aircraft_Design\Github\AeroSandbox\studies\TSher_Improvements\vlm_avl_liftingline_validation_outputs\avl_work\airplane.avl.af1

CLAF
1.0

CDCL
#CL1  CD1  CL2  CD2  CL3  CD3
0 0 0 0 0 0

#--------------------------------------------------
SECTION
#Xle    Yle    Zle     Chord   Ainc  [Nspanwise   Sspace]
0.48 5 0.35 0.65 -2

AFIL
C:\Users\tsher\OneDrive\Documents\Aircraft_Design\Github\AeroSandbox\studies\TSher_Improvements\vlm_avl_liftingline_validation_outputs\avl_work\airplane.avl.af2

CLAF
1.0

CDCL
#CL1  CD1  CL2  CD2  CL3  CD3
0 0 0 0 0 0

#===============================================================================
SURFACE
Horizontal Tail
#Nchordwise  Cspace  [Nspanwise   Sspace]
10   1   12   1

YDUPLICATE
0

CDCL
#CL1  CD1  CL2  CD2  CL3  CD3
0 0 0 0 0 0

#--------------------------------------------------
SECTION
#Xle    Yle    Zle     Chord   Ainc  [Nspanwise   Sspace]
4.8 0 0.25 0.7 0

AFIL
C:\Users\tsher\OneDrive\Documents\Aircraft_Design\Github\AeroSandbox\studies\TSher_Improvements\vlm_avl_liftingline_validation_outputs\avl_work\airplane.avl.af3

CLAF
1.0

CDCL
#CL1  CD1  CL2  CD2  CL3  CD3
0 0 0 0 0 0

#--------------------------------------------------
SECTION
#Xle    Yle    Zle     Chord   Ainc  [Nspanwise   Sspace]
4.98 1.45 0.32 0.42 0

AFIL
C:\Users\tsher\OneDrive\Documents\Aircraft_Design\Github\AeroSandbox\studies\TSher_Improvements\vlm_avl_liftingline_validation_outputs\avl_work\airplane.avl.af4

CLAF
1.0

CDCL
#CL1  CD1  CL2  CD2  CL3  CD3
0 0 0 0 0 0

#===============================================================================
SURFACE
Vertical Tail
#Nchordwise  Cspace  [Nspanwise   Sspace]
10   1   12   1

CDCL
#CL1  CD1  CL2  CD2  CL3  CD3
0 0 0 0 0 0

#--------------------------------------------------
SECTION
#Xle    Yle    Zle     Chord   Ainc  [Nspanwise   Sspace]
4.65 0 0.2 0.85 0

AFIL
C:\Users\tsher\OneDrive\Documents\Aircraft_Design\Github\AeroSandbox\studies\TSher_Improvements\vlm_avl_liftingline_validation_outputs\avl_work\airplane.avl.af5

CLAF
1.0

CDCL
#CL1  CD1  CL2  CD2  CL3  CD3
0 0 0 0 0 0

#--------------------------------------------------
SECTION
#Xle    Yle    Zle     Chord   Ainc  [Nspanwise   Sspace]
5 0 1.55 0.35 0

AFIL
C:\Users\tsher\OneDrive\Documents\Aircraft_Design\Github\AeroSandbox\studies\TSher_Improvements\vlm_avl_liftingline_validation_outputs\avl_work\airplane.avl.af6

CLAF
1.0

CDCL
#CL1  CD1  CL2  CD2  CL3  CD3
0 0 0 0 0 0
